# Отримав кут брюстера з 5 графіків і обрахував значення показника заломлення
λ := [550*10^-9*m; 650*10^-9*m; 750*10^-9*m; 850*10^-9*m; 950*10^-9*m]
φ := [58.1 °; 58 °; 58.3 °; 58.6 °; 59.2 °]
h_2π := 6.58212*10^-16
h := 4.135*10^-15*s
n := tan(φ)
E := h*c/λ
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E = [2.25389; 1.90714; 1.65286; 1.4584; 1.30489]
n = [1.60657; 1.60033; 1.61914; 1.63826; 1.67752]
# Роблю апроксимацію поліномом 3 степеню і перевіряю похибку
F(E) := [1; E; E^2; E^3]
a := linfit(E, n, F)
# MODEL:
f(E) := a[0] + a[1]*E + a[2]*E^2 + a[3]*E^3
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# determination coefficient for correlated results
RSS := sum((n[i] - f(E[i]))^2, i = 0 .. rows(E) - 1)
RSS = 3.24803e-5
TSS := sum((n[i] - (1/rows(E)*sum(n[i], i = 0 .. rows(E) - 1)))^2, i = 0 .. rows(E) - 1)
TSS = 0.00385974
R' := (1 - RSS/TSS)
R' = 0.991585
n' := n
# зробив прогнозування поліномом 3 порядку
F(eV) := interp(f(E), E, n, eV)
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N' := 100
i := 0 .. N' - 1
eV[i] := 0 + 3.6*i/N'
n' := f(eV)
N := rows(n') - 1
N = 99
E' := eV
E_max := max(E')
E_min := min(E')
k2 :=
    h ← (E_max - E_min)/N
    for i ∈ 0 .. N - 1
        S ← 0
        for j ∈ 0 .. N - 1
            S ← S + (n'[j]/(E'[j]^2 - E'[i]^2)) if E'[j]^2 - E'[i]^2 ≠ 0
            S ← S + (n'[j]/(E'[j + 1]^2 - E'[j]^2)) otherwise
        T[i] ← -2*E'[i]/π*h*((n'[0]/(E'[0]^2 - E'[i]^2) + n'[N]/(E'[N]^2 - E'[i]^2))/2 + S) if E'[0]^2 - E'[i]^2 ≠ 0
        T[i] ← -2*E'[i]/π*h*((n'[0]/(E'[i + 1]^2 - E'[i]^2) + n'[N]/(E'[N]^2 - E'[i]^2))/2 + S) otherwise
    T
k1 :=
    h ← (E_max - E_min)/N
    for i ∈ 0 .. N - 1
        S ← 0
        for j ∈ 0 .. N - 1
            S ← S + ((n'[j] - n'[i])/(E'[j]^2 - E'[i]^2)) if E'[j]^2 - E'[i]^2 ≠ 0
            S ← S + ((n'[j] - n'[i])/(E'[j + 1]^2 - E'[j]^2)) otherwise
        T[i] ← -2*E'[i]/π*h*(((n'[0] - n'[i])/(E'[0]^2 - E'[i]^2) + (n'[N] - n'[i])/(E'[N]^2 - E'[i]^2))/2 + S) if E'[0]^2 - E'[i]^2 ≠ 0
        T[i] ← -2*E'[i]/π*h*(((n'[0] - n'[i])/(E'[i + 1]^2 - E'[i]^2) + (n'[N] - n'[i])/(E'[N]^2 - E'[i]^2))/2 + S) otherwise
    T
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α1 :=
    for i ∈ 0 .. N - 1
        T[i] ← 2*k1[i]*(E'[i]/h_2π)/c if k1[i] ≥ 0
    T
α2 :=
    for i ∈ 0 .. N - 1
        T[i] ← 2*k2[i]*(E'[i]/h_2π)/c if k2[i] ≥ 0
    T
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