# semandko@gmail.com
# Semenenko Mykola
CTOL := 10^-30
TOL := CTOL
# Constants:
coul = 1 C
q := 1.60217653*10^-19*coul  # Charge of electron
q' := q
q_e := 1.60217653*10^-19
q_e = 1.60218*10^-19
eV := q*V
ε_0 = 552635*(eV/(V^2*cm))  # Electric constant
ε'_0 := ε_0
ε'_0 = 8.85419e-12 A^2*s^4/(kg*m^3)
ε_0 := 5.52635*10^5
k_B := 1.3806505*10^-23*joule/K = 8.61734e-5*(eV/K)  # Boltsmans constant
T_K := 296*K
m'_e := 9.1093826*10^-31*kg = 5.68563*10^-16*s^2*eV/cm^2
# Mass of electron
k_B*T_K = 0.0255073 eV
m_e := 5.68563*10^-16
c = 29979245800 cm/s
c' := c  # Speed of light
c := 2.99792*10^10
h := 6.6260693*10^-34*joule*sec = 4.13567e-15 eV
# annotation to a formula above: A listing of fundamental physical constants.
# Planks constants
h'_2π := h/(2*π) = 6.58212*10^-16*s*eV
joule = 10000 kg*cm^2/s^2
joule = 6.24151e18 eV
h_2π := 6.58212*10^-16
eV = 1.60218*10^-19*joule
x := READPRN("E.txt")
y := READPRN("R.txt")
# The procedure of sorting of the data by x in acseding order.
# Note: it is important to reduce the mistakes in calculations.
data[:, 0] := x
data[:, 1] := y
A := csort(data, 0)
N := rows(data)
E := A[:, 0]
R := A[:, 1]/100
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# Ploting of reflectance spectra versus eV
n_0 := 1  # for Air substrate interfaxe
ω := E
ω_max := max(ω)
ω_min := min(ω)
ω_max = 19.8594
ω_min = 0.872
# Transformation of reflaction spectrum in phase shifting by Kramers-Kronig relation
θ :=
    h ← (ω_max - ω_min)/N
    for i ∈ 0 .. N - 1
        S ← 0
        for j ∈ 0 .. N - 2
            S ← S + (ln(sqrt(R[j])) - ln(sqrt(R[i])))/(ω[j]^2 - ω[i]^2)
        T[i] ← -2*ω[i]/π*h*S
    T
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data :=
    h ← 1
    for i ∈ 0 .. N - 1
        T[i, 0] ← (1 - R[i])/(1 + R[i] - 2*sqrt(R[i]*cos(θ[i])))*n_0
        T[i, 1] ← -2*sqrt(R[i])*sin(θ[i])/(1 + R[i] - 2*sqrt(R[i]*cos(θ[i])))*n_0
    h ← 1
    T
n := data[:, 0]
k := data[:, 1]
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# Pole coordinat
a :=
    for i ∈ 0 .. N - 1
        T[i] ← sqrt(R[i])*cos(θ[i])
    T
b :=
    for i ∈ 0 .. N - 1
        T[i] ← sqrt(R[i])*sin(θ[i])
    T
r :=
    for i ∈ 0 .. N - 1
        T[i] ← sqrt(a[i]^2 + b[i]^2)
    T
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