# semandko@gmail.com
# Semenenko Mykola
CTOL := 10^-30
TOL := CTOL
# Constants:
coul = 1 C
q := 1.60217653*10^-19*coul  # Charge of electron
q' := q
q_e := 1.60217653*10^-19
q_e = 1.60218*10^-19
eV := q*V
ε_0 = 552635*(eV/(V^2*cm))  # Electric constant
ε'_0 := ε_0
ε'_0 = 8.85419e-12 A^2*s^4/(kg*m^3)
ε_0 := 5.52635*10^5
k_B := 1.3806505*10^-23*joule/K = 8.61734e-5*(eV/K)  # Boltsmans constant
T_K := 296*K
m'_e := 9.1093826*10^-31*kg = 5.68563*10^-16*s^2*eV/cm^2
# Mass of electron
k_B*T_K = 0.0255073 eV
m_e := 5.68563*10^-16
c = 29979245800 cm/s
c' := c  # Speed of light
c := 2.99792*10^10
h := 6.6260693*10^-34*joule*sec = 4.13567e-15 eV
# annotation to a formula above: A listing of fundamental physical constants.
# Planks constants
h'_2π := h/(2*π) = 6.58212*10^-16*s*eV
joule = 10000 kg*cm^2/s^2
joule = 6.24151e18 eV
h_2π := 6.58212*10^-16
eV = 1.60218*10^-19*joule
x := READPRN("E.txt")
y := READPRN("R.txt")
# The procedure of sorting of the data by x in acseding order.
# Note: it is important to reduce the mistakes in calculations.
data[:, 0] := x
data[:, 1] := y
A := csort(data, 0)
N := rows(data)
E := A[:, 0]
R := A[:, 1]
ω := E
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# Ploting of reflectance spectra versus eV
R := R/100
ω_max := max(ω)
ω_min := min(ω)
ω_max = 19.8594
ω_min = 0.872
h := (ω_max - ω_min)/N
# Transformation of reflaction spectrum in phase shifting by Kramers-Kronig relation
θ :=
    for i ∈ 0 .. N - 1
        S ← 0
        for j ∈ 0 .. N - 1
            S ← S + (ln(sqrt(R[j])) - ln(sqrt(R[i])))/(ω[j]^2 - ω[i]^2)
        T[i, 0] ← -2*ω[i]/π*h*(((ln(sqrt(R[0])) - ln(sqrt(R[i])))/(ω_min^2 - ω[i]^2) + (ln(sqrt(R[N - 1])) - ln(sqrt(R[N - 1])))/(ω_max^2 - ω[i]^2))/2 + S)
        T[i, 1] ← -2*ω[i]/π*h*(((ln(sqrt(R[0])) - ln(sqrt(R[i])))/(ω_min^2 - ω[i]^2) + (ln(sqrt(R[N - 1])) - ln(sqrt(R[N - 1])))/(ω_max^2 - ω[i]^2))/2 + S) - π
        T[i, 2] ← π - (-2*ω[i]/π*h*(((ln(sqrt(R[0])) - ln(sqrt(R[i])))/(ω_min^2 - ω[i]^2) + (ln(sqrt(R[N - 1])) - ln(sqrt(R[N - 1])))/(ω_max^2 - ω[i]^2))/2 + S))
    T
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r' :=
    for i ∈ 0 .. N
        T[i] ← sqrt(R)*e^(1i*θ[:, 0])
    T
r' = [
    57.4058 - 27.4286i; 57.4058 - 27.4286i; 57.4058 - 27.4286i; 57.4058 - 27.4286i; 57.4058 - 27.4286i; 57.4058 - 27.4286i; 57.4058 - 27.4286i; 57.4058 - 27.4286i; 57.4058 - 27.4286i; 57.4058 - 27.4286i
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]
# Calculation of components (real and imiginary) of reflection
n_0 := 1
n' :=
    for i ∈ 0 .. N - 1
        N1 ← 4*n_0/(1 - R[i]) - 2*n_0
        K1 ← 2*n_0/tan(θ[:, 2][i])
        T[i, 0] ← (K1^2*N1 + 4*n_0^2*N1 - K1*sqrt((K1^2 + 4*n_0^2)*(N1^2 - 4*n_0^2)))/(2*(K1^2 + N1^2))
        T[i, 1] ← (K1^2*N1 - 4*n_0^2*K1 - N1*sqrt((K1^2 + 4*n_0^2)*(N1^2 - 4*n_0^2)))/(2*(K1^2 + N1^2))
        T[i, 2] ← (K1^2*N1 + 4*n_0^2*N1 + K1*sqrt((K1^2 + 4*n_0^2)*(N1^2 - 4*n_0^2)))/(2*(K1^2 + N1^2))
        T[i, 3] ← (K1^2*N1 - 4*n_0^2*K1 + N1*sqrt((K1^2 + 4*n_0^2)*(N1^2 - 4*n_0^2)))/(2*(K1^2 + N1^2))
    T
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t_n := 2
t_k := 3
n'' := n'[:, t_n]
k'' := n'[:, t_k]
n''[2] = 0.123522
k''[2] = 4.72322
n_0 = 1
n := 1
k := 0.1
F(n, k, R) := (R - (1 - 4*n_0*n/((n_0 + n)^2 + k^2)))^2
# Kramers-Kronig conversion block
k_kk :=
    for i ∈ 0 .. N - 1
        S ← 0
        for j ∈ 0 .. N - 2
            S ← S + (((n''[j] - n''[i])/(ω[j]^2 - ω[i]^2) + (n''[j + 1] - n''[i])/(ω[j + 1]^2 - ω[i]^2))/2)
        T[i] ← -2*ω[i]/π*h*S
    T
Given
n > 1.6
k ≥ 0
z(n, k, R) := Minimize(F, n, k)
z(n, k, R[2]) = [8.09897; 0.0683424]
R'' :=
    for i ∈ 0 .. N - 1
        F ← 1
        T[i, 0] ← R[i]
        T[i, 1] ← z(n''[i], k''[i], R[i])[0]
        T[i, 2] ← z(n''[i], k''[i], R[i])[1]
        T[i, 3] ← (1 - 4*n_0*T[i, 1]/((n_0 + T[i, 1])^2 + T[i, 2]^2))
    T
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# Control of the reflection
n := n'[:, t_n]
k := n'[:, t_k]
R' :=
    for i ∈ 0 .. N - 1
        T[i, 0] ← 1 - 4*n_0*n[i]/((n_0 + n[i])^2 + k[i]^2)
        T[i, 1] ← 1 - 4*n_0*n[i]/((n_0 + n[i])^2 + k_kk[i]^2)
    T
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# Calculation of components (real and imiginary) of complex dielectric function
n := n
k := k_kk
ε :=
    for i ∈ 0 .. N - 1
        T[i, 0] ← ω[i]
        T[i, 1] ← n[i]^2 - k[i]^2
        T[i, 2] ← 2*n[i]*k[i]
        T[i, 3] ← T[i, 2]/(T[i, 1]^2 + T[i, 2]^2)
        T[i, 4] ← 1
    T
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# Calculation of absorbance spectrum (Tauc plots)
c = 29979200000
c' = 29979245800 cm/s
2*k[1]*ω[1]/c = -1.56064e-12
2*k[1]*E[1]/h_2π/c = -2371.03
α :=
    for i ∈ 0 .. N - 1
        if k[i] ≥ 0
            T[i, 1] ← 2*k[i]*ω[i]/c
            T[i, 2] ← (T[i, 1]*ω[i])^2
            T[i, 3] ← T[i, 1]^2
    T
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# Calculation of effective dencity of carriers (Sum rules)
5.68563*10^-16*s^2*eV/cm^2
m_e = 5.68563*10^-16
q_e = 1.60218*10^-19
q = 1.60218e-19 C
q'' := 1  # eV
ε'_0 = 552635*(eV/(V^2*cm))
ε_0 = 552635
T''[i, 2] ← w_p^2*m_e*ε_0/(4*π*q_e^2)  # effective concentration of valence electrons
ω[2] = 1.1533
Sum :=
    for i ∈ 0 .. N - 2
        T[i, 0] ← 2/π*h*((ε[:, 2][i]/(ε[:, 1][i]^2 + ε[:, 2][i]^2)*ω[i] + ε[:, 2][i + 1]/(ε[:, 1][i + 1]^2 + ε[:, 2][i + 1]^2)*ω[i + 1])/2)
        T[i, 2] ← T[i, 0]*m_e*ε_0/(4*π*q''^2)
        T[i, 4] ← 1 + 2/π*h*((ε[:, 2][i]*1/ω[i] + ε[:, 2][i + 1]*1/ω[i + 1])/2)
    T
N'_ef := Sum[:, 2]
ε' := Sum[:, 4]
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ε'[2] = 0.999404
ε' = [
    0.999431; 0.999422; 0.999404; 0.999382; 0.999356; 0.999335; 0.999318; 0.999285; 0.999258; 0.999214
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]
m'_e = 5.68563*10^-16*s^2*eV/cm^2
ε'_0 = 552635 eV/cm
q = 1e19 eV/V*10^-19
N'_ef[2] = -9.1296e-11
N''' :=
    for i ∈ 0 .. N - 2
        T[i] ← (ω[i]*s^-1)^2*m'_e*ε'_0*ε[:, 1][i]/(4*π*q^2)
    T
N'''[2] = 4.81644e-13 1/cm^3
# Optical cinductivity (Drude model)
ε'_0 = 8.85419*10^-18*cm^-3  # vacuum permitivety
ε'_0 = 552635 eV/(V^2*cm)
ε_0 = 552635
h_2π = 6.58212*10^-16  # Dirac constant
c = 29979200000  # speed of light
ω[3] = 1.294
ε[:, 2][1] = -0.00586348
ε_0*ω[1] = 559653
ε'_0*ω[1]*s^-1 = 8.96664e-14 1/(cm*Ω)
ε'_0*ω[1]*s^-1 = 8.96664e-12 A^2*s^3/(kg*m^3)
σ_r :=
    for i ∈ 0 .. N - 2
        T[i] ← 1/(4*π)*ε'_0*ω[i]*s^-1*ε[:, 2][i]
    T
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ρ_r := 1/σ_r
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σ_r = [
    -3.10667e-15; -4.18384e-15; -5.59087e-15; -7.28209e-15; -8.92739e-15; -1.08998e-14; -1.28108e-14; -1.41593e-14; -1.71029e-14; -1.84788e-14
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] A^2*s^3/(kg*m^3)
σ_r = [
    -3.10667e-17; -4.18384e-17; -5.59087e-17; -7.28209e-17; -8.92739e-17; -1.08998e-16; -1.28108e-16; -1.41593e-16; -1.71029e-16; -1.84788e-16
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] 1/(cm*Ω)
ρ_r = [
    -3.21888e16; -2.39015e16; -1.78863e16; -1.37323e16; -1.12015e16; -9.17451e15; -7.8059e15; -7.06248e15; -5.84695e15; -5.41162e15
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] Ω*cm
# Optical carrier mobility
# control the dimensions
σ'_r := σ_r*Ω*cm
ρ'_r := ρ_r*1/(Ω*cm)
σ'_r[2] = -5.59087e-17
σ_r[2] = -5.59087e-15 A^2*s^3/(kg*m^3)
ρ'_r[2] = -1.78863e16
ρ_r[2] = -1.78863e14 kg*m^3/(A^2*s^3)
σ_r[2] = -5.59087e-17 1/(cm*Ω)
ρ_r[2] = -1.78863e16 cm*Ω
N'_ef[2] = -9.1296e-11
μ := σ_r/(N'_ef*cm^-3*q''*eV/V)
q'' = 1
μ'' := σ_r/(N'''*q''*eV/V)
q'' = 1
μ' :=
    for i ∈ 0 .. N - 2
        T[i] ← σ'_r[i]/(N'_ef[i]*q_e)
    T
μ''' :=
    for i ∈ 0 .. N - 2
        T[i] ← σ'_r[i]/(N'''[i]*cm^3*q_e)
    T
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μ'[2] = 3.82223e12
μ[2] = 3.82223e12 cm^2/(V*s)
μ''[2] = -7.24508e14 cm^2/(V*s)
μ'''[2] = -7.24508e14
# Calculation of third derivatives of components of complex dielectric function.
f :=
    for i ∈ 0 .. N - 1
        T[i] ← ε[:, 2][i]*E[i]^2
    T
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ε'''_r :=
    for d ∈ 0 .. 2
        for i ∈ 0 .. N - 2
            T[i, d] ← (f[i + 1] - f[i])/(E[i + 1] - E[i])
            f[i] ← T[i, d]
            M[i, d] ← 1/E[i]^2*f[i]
    M
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ε'''_r = [
    -0.0202696, -0.0645458, -0.0525939;
    -0.0217619, -0.0533429, -0.0898078;
    -0.0225621, -0.0508654, -0.158014;
    -0.0236074, -0.058066, 0.311511;
    -0.0255112, -0.0194856, -0.655712;
    -0.0237517, -0.0799517, -0.0689104;
    -0.028386, -0.0760258, 1.24207;
    -0.0305233, -0.00569741, -2.60282;
    -0.027391, -0.262372, 1.45636;
    -0.0396239, -0.169761, 0.516577
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]
# Results table
# coloms | 0 | 1 | 2 | 3 | 4 | 5 | 6 | 7 | 8 | 9 | 10 | 11 | 12
# square of absorbance,
# (cm^-1)^2
# N.ef,
# atm/cm^3
# Loss function
# optical conductivety
# optical mobility
# E
# n
# absorbance, cm^-1
# square of absorbance, Tauc Eg
# (eVcm^-1)^2
# third der Re(e)
# k | Re (ε1) | Im(ε2) | Im(1/ε) | 1/(Ohm cm) | cm^2/(V s)
N''' := N'''*cm^3
data1[:, 10] := ε[:, 3]
data1[:, 11] := σ'_r
data1[:, 12] := μ'''
data1[:, 9] := ε'''_r[:, 2]
data1[:, 0] := E
data1[:, 1] := n
data1[:, 6] := α[:, 2]
data1[:, 7] := α[:, 3]
data1[:, 8] := N'''
data1[:, 2] := k
data1[:, 3] := ε[:, 1]
data1[:, 4] := ε[:, 2]
data1[:, 5] := α[:, 1]
σ'_r[2] = -5.59087e-17
μ'''[2] = -7.24508e14
ε'''_r[:, 2][2] = -0.158014
ε[:, 3][2] = -26.7637
α[:, 3][2] =  # error: Значение должно быть массивом.
N'''[2] = 4.81644e-13
α[:, 1][2] =  # error
α[:, 2][2] =  # error
E[2] = 1.1533
n[2] = 0.123522
k[2] = -0.0278498
ε[:, 1][2] = 0.0144822
ε[:, 2][2] = -0.00688015
data1 =  # error: Эта переменная не определена.
