CTOL := 10^-22
TOL := CTOL
# Constants:
q := 1.60217653*10^-19*coul  # Charge of electron
eV := q*V
q := 1
ε_0 = 552635*(eV/(V^2*cm))  # Electric constant
k_B := 1.3806505*10^-23*joule/K = 8.61734e-5*(eV/K)  # Boltsmans constant
T_K := 300*K
m_e := 9.1093826*10^-31*kg = 5.68563*10^-16*s^2*eV/cm^2  # Mass of electron
m_e := 5.68563*10^-16
c = 29979245800 cm/s  # Speed of light
c := 2.99792*10^10
h := 6.6260693*10^-34*joule*sec = 4.13567e-15 eV
# annotation to a formula above: A listing of fundamental physical constants.
# Planks constants
h_2π := h/(2*π) = 6.58212*10^-16*s*eV
joule = 10000 kg*cm^2/s^2
h_2π := 6.58212*10^-16
x := READPRN("E.txt")
y := READPRN("e1.txt")  # error: Не удается открыть файл данных.
# The procedure of sorting of the data by x in acseding order.
# Note: it is important to reduce the mistakes in calculations.
data[:, 0] := x
data[:, 1] := y
A := csort(data, 0)
N := rows(data) - 1
E := A[:, 0]
ε1 := A[:, 1]
# Ploting of Re(ε) spectra versus eV
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N =  # error: Эта переменная не определена.
n := ceil((N - 1)/4)
E_max := max(E)
E_min := min(E)
n =  # error
# Note: The corresponding dimensions were included to control the calculations
m := E
# Note: to find singularities the counter is used in the same wheighting procedure as variables, thus
# the variables should be dimensionless to cross this mismatch.
# Transformation of reflaction spectrum in phase by Kramers-Kronig relation
# Note: 5 points numerical integration scheme (Booles rule).
E[1] =  # error
m[1] =  # error
N =  # error
n =  # error
E[N] =  # error
m[N] =  # error
ε3 :=
    h ← (E_max - E_min)/N
    for i ∈ 0 .. N - 1
        S ← 0
        for j ∈ 0 .. N - 1
            S ← S + (ε1[j]/(E[j]^2 - E[i]^2)) if E[j]^2 - E[i]^2 ≠ 0
            S ← S + (ε1[j]/(E[j + 1]^2 - E[j]^2)) otherwise
        T[i] ← -2*E[i]/π*h*((ε1[0]/(E[0]^2 - E[i]^2) + ε1[N]/(E[N]^2 - E[i]^2))/2 + S) if E[0]^2 - E[i]^2 ≠ 0
        T[i] ← -2*E[i]/π*h*((ε1[0]/(E[i + 1]^2 - E[i]^2) + ε1[N]/(E[N]^2 - E[i]^2))/2 + S) otherwise
    T
ε2 :=
    h ← (E_max - E_min)/N
    for i ∈ 0 .. N - 1
        S ← 0
        for j ∈ 1 .. N - 1
            S ← S + ((ε1[j] - ε1[i])/(E[j]^2 - E[i]^2))
        T[i] ← -2*E[i]/π*h*(((ε1[0] - ε1[i])/(E[0]^2 - E[i]^2) + (ε1[N] - ε1[i])/(E[N]^2 - E[i]^2))/2 + S)
    T
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# Calculation of components (real and imiginary) of complex dielectric function
# Eylers formula
ε :=
    L ← 0
    for i ∈ 0 .. N - 1
        T[i, 0] ← ε1[i] + 1i*ε2[i]
        T[i, 1] ← sqrt((sqrt(ε1[i]^2 + ε2[i]^2) + ε1[i])/2)
        T[i, 2] ← sqrt((sqrt(ε1[i]^2 + ε2[i]^2) - ε1[i])/2)
        T[i, 3] ← -Im(1/T[i, 0])
    T
# Plotting of components of complex dielectric function
# complex dielectric function | energy loss function | complex refractive index
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