CTOL := 10^-22
TOL := CTOL
# Constants:
q := 1.60217653*10^-19*coul  # Charge of electron
eV := q*V
q := 1
ε_0 = 552635*(eV/(V^2*cm))  # Electric constant
k_B := 1.3806505*10^-23*joule/K = 8.61734e-5*(eV/K)  # Boltsmans constant
T_K := 300*K
m_e := 9.1093826*10^-31*kg = 5.68563*10^-16*s^2*eV/cm^2  # Mass of electron
m_e := 5.68563*10^-16
c = 29979245800 cm/s  # Speed of light
c := 2.99792*10^10
h := 6.6260693*10^-34*joule*sec = 4.13567e-15 eV
# annotation to a formula above: A listing of fundamental physical constants.
# Planks constants
h_2π := h/(2*π) = 6.58212*10^-16*s*eV
joule = 10000 kg*cm^2/s^2
h_2π := 6.58212*10^-16
x := READPRN("E.txt")
y := READPRN("R.txt")
# The procedure of sorting of the data by x in acseding order.
# Note: it is important to reduce the mistakes in calculations.
data[:, 0] := x
data[:, 1] := y
A := csort(data, 0)
N := rows(data) - 1
E := A[:, 0]
R := A[:, 1]
# Ploting of reflectance spectra versus eV
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N = 1283
n := ceil((N - 1)/4)
n = 321
# Note: The corresponding dimensions were included to control the calculations
m := E
# Note: to find singularities the counter is used in the same wheighting procedure as variables, thus
# the variables should be dimensionless to cross this mismatch.
# phase shift of reflection
# Transformation of reflaction spectrum in phase by Kramers-Kronig relation
E[1] = 0.77611
m[1] = 0.77611
N = 1283
n = 321
R1 :=
    for i ∈ 0 .. N - 1
        T[i, 0] ← E[i]
        T[i, 1] ← ln(R[i]^(1/2))
    T
E[N] = 3.90346
m[N] = 3.90346  # Monte Carlo
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Y := max(ln(R^(1/2)))
# Simpson
Y = -1.01172
Z := vlookup(R1[:, 0][7], R1, 1)
R1[:, 1][7] = -1.01305
Z = [-1.01305]
θ_s :=
    h ← E[2] - E[1]
    for i ∈ 0 .. N - 1
        S ← 0
        for j ∈ 0 .. N - 1
            A ← E[j]^2 - E[i]^2
            B ← E[j + 1]^2 - E[i]^2
            if A and B ≠ 0
                M ← h/2*((ln(R[j + 1]^(1/2)) - ln(R[i]^(1/2)))/B + (ln(R[j]^(1/2)) - ln(R[i]^(1/2)))/A)
                S ← S + M
        T[i] ← -2/π*E[i]*S
    T
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T[i] ← Z[i] if Z[i] ≥ 0 or Z[i] ≤ -π
T[i] ← 0 otherwise
# Calculation of components (real and imiginary) of complex dielectric function
# Eylers formula
ε' :=
    L ← 0
    for i ∈ 0 .. N - 1
        T[i, 0] ← (1 + sqrt(R[i])*e^(1i*θ_s[i]))/(1 - sqrt(R[i])*e^(1i*θ_s[i]))
        T[i, 1] ← Re(T[i, 0]^2)
        T[i, 2] ← Im(T[i, 0]^2)
        T[i, 3] ← sqrt((sqrt(T[i, 1]^2 + T[i, 2]^2) + T[i, 1])/2)
        T[i, 4] ← sqrt((sqrt(T[i, 1]^2 + T[i, 2]^2) - T[i, 1])/2)
        T[i, 5] ← -Im(1/T[i, 0]^2)
        T[i, 6] ← -Im(1/(1 + T[i, 0]^2))
    T  # n, k
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k := ε'[:, 4]
α :=
    for i ∈ 0 .. N - 1
        if k[i] ≥ 0
            T[i, 1] ← k[i]*2*E[i]/(h_2π*c)
            T[i, 2] ← (T[i, 1]*E[i])^2
    T
# Results
# E | n | k | ε1 | ε2 | absorbance | square of absorbance
data1[:, 0] := E
data1[:, 1] := ε'[:, 3]
data1[:, 2] := ε'[:, 4]
data1[:, 3] := ε'[:, 1]
data1[:, 4] := ε'[:, 2]
data1[:, 5] := α[:, 1]
data1[:, 6] := α[:, 2]
data1 =  # no stored result
# Plotting of components of complex dielectric function
# complex dielectric function | energy loss function: bulk and surface | complex refractive index | absorbance coefficients
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# Calculation of third derivatives of components of complex dielectric function.
# Note: using cubic spline itteration.
x := 0, 0.005 .. 4
x := 0, 0.005 .. 4
E :=
    for i ∈ 0 .. N - 1
        T[i] ← E[i]
    T  # Normalization of rows in order
ε1 := Re(ε'[:, 0]^2)
ε2 := Im(ε'[:, 0]^2)
S1 := cspline(E, ε1)
S2 := cspline(E, ε2)
fit1(x) := interp(S1, E, ε1, x)
fit2(x) := interp(S2, E, ε2, x)
dfit1'''(x) := d^3/dx^3(fit1(x))
dfit2'''(x) := d^3/dx^3(fit2(x))
d3 :=
    L ← 1
    for i ∈ 0 .. N - 1
        T[i, 1] ← dfit1'''(E[i])
        T[i, 2] ← dfit2'''(E[i])
    T
# Plotting of of third derivatives of components of complex dielectric function.
# Note: these transitions are atributed to the dirrect optical transition in Brillouin zone in recpect to singularites of Van-Hove.
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# Effective density of states
N_eff.bulk :=
    f ← ε'[:, 5]
    for i ∈ 0 .. N
        S ← 0
        for j ∈ 1 .. n - 1
            C1 ← f[4*j - 2]
            C2 ← f[4*j - 1]
            C3 ← f[4*j]
            C4 ← f[4*j + 1]
            C5 ← f[4*j + 2]
            M ← (E[4*j + 1] - E[4*j])/45*(14*C1 + 64*C2 + 24*C3 + 64*C4 + 14*C5)
            S ← S + M*E[i]
        T[i] ← 1/h_2π*S
    T  # error: Индекс массива является недопустимым для этого массива.
N_eff.surf :=
    f ← ε'[:, 6]
    for i ∈ 0 .. N
        S ← 0
        for j ∈ 1 .. n - 1
            C1 ← f[4*j - 2]
            C2 ← f[4*j - 1]
            C3 ← f[4*j]
            C4 ← f[4*j + 1]
            C5 ← f[4*j + 2]
            M ← (E[4*j + 1] - E[4*j])/45*(14*C1 + 64*C2 + 24*C3 + 64*C4 + 14*C5)
            S ← S + M*E[i]
        T[i] ← 1/h_2π*S
    T  # error: Индекс массива является недопустимым для этого массива.
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# Collection of the results in a table:
# absorbtion in cm^-1 | loss function
# ε'[:, 1] | ε'[:, 2] | n | k | third*ε'[:, 1] | third*ε'[:, 2] | volume | surface
data[:, 0] := E
data[:, 1] := R
data[:, 2] := ε'[:, 1]
data[:, 3] := ε'[:, 2]
data[:, 4] := ε'[:, 3]
data[:, 5] := ε'[:, 4]
data[:, 6] := d3[:, 1]
data[:, 7] := d3[:, 2]
data[:, 8] := α[:, 1]
data[:, 9] := α[:, 2]
data[:, 10] := ε'[:, 5]
data[:, 11] := ε'[:, 6]
dfit1'''(x) =  # no stored result
x =  # no stored result
data =  # no stored result
