# Отримав кут брюстера з 5 графіків і обрахував значення показника заломлення
h_2π := 6.58212*10^-16
λ := [550*10^-9*m; 650*10^-9*m; 750*10^-9*m; 850*10^-9*m; 950*10^-9*m]
φ := [58.1 °; 58.95 °; 59.35 °; 59.4 °; 59.7 °]
h := 4.135*10^-15*s
n := tan(φ)
E := h*c/λ
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# Роблю апроксимацію поліномом 3 степеню і перевіряю похибку
f(E) := [1; E; E^2; E^3]
a := linfit(E, n, f)
a = [2.44606; -1.28056; 0.749646; -0.153871]
f(E) := a[0] + a[1]*E + a[2]*E^2 + a[3]*E^3
S := 1/rows(E)*sqrt(sum((n[i] - f(E))^2, i = 0 .. rows(E) - 1))
d := S/(1/rows(E)*sum(|n[i]|, i = 0 .. rows(E) - 1))*100 = [1.99541; 0.993421; 1.01331; 1.16433; 1.4073]
# напартачив зі скобками біля n_i, повинно було одне значення вийти (насправді перевірив в екселі і там кофіцієнт детермінації 0,978 тобто поліном третього степеню підходить для опису функції)
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# зробив прогнозування
F(eV) := interp(f(E), E, n, eV)
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eV := transpose([
    0, 0.1, 0.2, 0.3, 0.4, 0.5, 0.6, 0.7, 0.8, 0.9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])  # можливо є кращий варіан запису
N := rows(f(eV)) - 1
E := eV
n := ceil((N - 1)/4)
ε1 := f(eV)
E_max := max(E)
E_min := min(E)
m := E
E[1] = 0.1
m[1] = 0.1
N = 36
E[N] = 3.6
m[N] = 3.6
n = 9
ε3 :=
    h ← (E_max - E_min)/N
    for i ∈ 0 .. N - 1
        S ← 0
        for j ∈ 0 .. N - 1
            S ← S + (ε1[j]/(E[j]^2 - E[i]^2)) if E[j]^2 - E[i]^2 ≠ 0
            S ← S + (ε1[j]/(E[j + 1]^2 - E[j]^2)) otherwise
        T[i] ← -2*E[i]/π*h*((ε1[0]/(E[0]^2 - E[i]^2) + ε1[N]/(E[N]^2 - E[i]^2))/2 + S) if E[0]^2 - E[i]^2 ≠ 0
        T[i] ← -2*E[i]/π*h*((ε1[0]/(E[i + 1]^2 - E[i]^2) + ε1[N]/(E[N]^2 - E[i]^2))/2 + S) otherwise
    T
ε2 :=
    h ← (E_max - E_min)/N
    for i ∈ 0 .. N - 1
        S ← 0
        for j ∈ 0 .. N - 1
            S ← S + ((ε1[j] - ε1[i])/(E[j]^2 - E[i]^2)) if E[j]^2 - E[i]^2 ≠ 0
            S ← S + ((ε1[j] - ε1[i])/(E[j + 1]^2 - E[j]^2)) otherwise
        T[i] ← -2*E[i]/π*h*(((ε1[0] - ε1[i])/(E[0]^2 - E[i]^2) + (ε1[N] - ε1[i])/(E[N]^2 - E[i]^2))/2 + S) if E[0]^2 - E[i]^2 ≠ 0
        T[i] ← -2*E[i]/π*h*(((ε1[0] - ε1[i])/(E[i + 1]^2 - E[i]^2) + (ε1[N] - ε1[i])/(E[N]^2 - E[i]^2))/2 + S) otherwise
    T
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E := eV
R := f(eV)
ω := E/h_2π
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ω_max := max(ω)
ω_min := min(ω)
R := R/100
ω_min = 0
ω_max = 5.46936e15
h := (ω_max - ω_min)/N
α :=
    for i ∈ 0 .. N - 1
        T[i] ← 2*ε2[i]*ω[i]/c if ε2[i] ≥ 0
    T
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