CTOL := 10^-22
TOL := CTOL
# Constants:
q := 1.60217653*10^-19*coul  # Charge of electron
eV := q*V
q := 1
ε_0 = 552635*(eV/(V^2*cm))  # Electric constant
k_B := 1.3806505*10^-23*joule/K = 8.61734e-5*(eV/K)  # Boltsmans constant
T_K := 300*K
m_e := 9.1093826*10^-31*kg = 5.68563*10^-16*s^2*eV/cm^2  # Mass of electron
m_e := 5.68563*10^-16
c = 29979245800 cm/s  # Speed of light
c := 2.99792*10^10
h := 6.6260693*10^-34*joule*sec = 4.13567e-15 eV
# annotation to a formula above: A listing of fundamental physical constants.
# Planks constants
h_2π := h/(2*π) = 6.58212*10^-16*s*eV
joule = 10000 kg*cm^2/s^2
h_2π := 6.58212*10^-16
x := READPRN("ev.txt")
y := READPRN("k.txt")
# The procedure of sorting of the data by x in acseding order.
# Note: it is important to reduce the mistakes in calculations.
data[:, 0] := x
data[:, 1] := y
A := csort(data, 0)
N := rows(data) - 1
N = 394
E := A[:, 0]
k := A[:, 1]
# Ploting of Re(ε) spectra versus eV
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N = 394
n := ceil((N - 1)/4)
n = 99
E_max := max(E)
E_min := min(E)
# Note: The corresponding dimensions were included to control the calculations
# Note: to find singularities the counter is used in the same wheighting procedure as variables, thus
# the variables should be dimensionless to cross this mismatch.
h_2π := 6.58212*10^-16
α :=
    for i ∈ 0 .. N
        T[i, 0] ← 4*π*E[i]*k[i]/(h_2π*c)
        T[i, 1] ← 1
    T
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# Transformation of reflaction spectrum in phase by Kramers-Kronig relation
# Note: 5 points numerical integration scheme (Booles rule).
E[1] = 0.82958
N = 394
n = 99
E[N] = 41.3995
z := ceil((N - 1)/4)
ω := E
N = 394
z = 99
# Booles rule | Trapezoidum
n' :=
    for i ∈ 0 .. N
        S ← 0
        for j ∈ 1 .. z - 1
            A ← ω[4*j - 2]^2 - ω[i]^2
            B ← ω[4*j - 1]^2 - ω[i]^2
            C ← ω[4*j]^2 - ω[i]^2
            D ← ω[4*j + 1]^2 - ω[i]^2
            F ← ω[4*j + 2]^2 - ω[i]^2
            if A and B and C and D and F ≠ 0
                C0 ← ω[i]*k[i]
                C1 ← ω[4*j - 2]*k[4*j - 2] - C0
                C2 ← ω[4*j - 1]*k[4*j - 1] - C0
                C3 ← ω[4*j]*k[4*j] - C0
                C4 ← ω[4*j + 1]*k[4*j + 1] - C0
                C5 ← ω[4*j + 2]*k[4*j + 2] - C0
                M ← (ω[4*j + 1] - ω[4*j])/45*(14*C1/A + 64*C2/B + 24*C3/C + 64*C4/D + 14*C5/F)
                S ← S + M
        T[i] ← 2/π*S + 1
    l ← 0
    T
n_t :=
    h ← ω[2] - ω[1]
    for i ∈ 0 .. N - 1
        S ← 0
        for j ∈ 0 .. N - 1
            A ← ω[j]^2 - ω[i]^2
            B ← ω[j + 1]^2 - ω[i]^2
            if A and B ≠ 0
                M ← h/2*((ω[j + 1]*k[j + 1] - ω[i]*k[i])/B + (ω[j]*k[j] - ω[i]*k[i])/A)
                S ← S + M
            S ← S + (k[i]/ω[i]) otherwise
        T[i] ← 2/π*S + 1
    T
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n_exp := READPRN("n.txt")
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